# OpenSim document version 30000
InverseKinematicsTool A01_PREF_T0018_LockState4:
  results_directory: ./
  model_file: C:\Users\Mark\Documents\AutoPlaceGit\opensim-marker-place-toolbox\A01\Models\AutoPlaced\A01_passive_FULL_auto_marker_place_FLEXION_PISTON_4dof_orientation.osim
  constraint_weight: Inf
  accuracy: 1e-5
  marker_file: C:\Users\Mark\Documents\AutoPlaceGit\opensim-marker-place-toolbox\A01\MarkerData\PREF\A01_PREF_T0018.trc
  time_range: 0 1.1875
  report_errors: true
  output_motion_file: C:\Users\Mark\Documents\AutoPlaceGit\opensim-marker-place-toolbox\A01\IKResults\A01_PREF_T0018_LockState4_ik.mot
  report_marker_locations: false
  IKTaskSet:
    IKMarkerTask R_AC: apply=true weight=3
    IKMarkerTask L_AC: apply=true weight=3
    IKMarkerTask R_ASIS: apply=true weight=10
    IKMarkerTask L_ASIS: apply=true weight=10
    IKMarkerTask R_PSIS: apply=true weight=10
    IKMarkerTask L_PSIS: apply=true weight=10
    IKMarkerTask R_GT: apply=false weight=1
    IKMarkerTask L_GT: apply=false weight=1
    IKMarkerTask R_IC: apply=false weight=1
    IKMarkerTask L_IC: apply=false weight=1
    IKMarkerTask SACRAL: apply=false weight=1
    IKMarkerTask R_THIGH_PROX_POST: apply=true weight=20
    IKMarkerTask R_THIGH_PROX_ANT: apply=true weight=20
    IKMarkerTask R_THIGH_DIST_ANT: apply=true weight=20
    IKMarkerTask R_THIGH_DIST_POST: apply=true weight=20
    IKMarkerTask R_LAT_KNEE: apply=false weight=1
    IKMarkerTask R_MED_KNEE: apply=false weight=1
    IKMarkerTask R_SHANK_PROX_POST: apply=true weight=20
    IKMarkerTask R_SHANK_PROX_ANT: apply=true weight=20
    IKMarkerTask R_SHANK_DIST_ANT: apply=true weight=20
    IKMarkerTask R_SHANK_DIST_POST: apply=true weight=20
    IKMarkerTask R_LAT_ANK: apply=false weight=1
    IKMarkerTask R_MED_ANK: apply=false weight=1
    IKMarkerTask R_HEEL_SUP: apply=true weight=10
    IKMarkerTask R_HEEL_MED: apply=true weight=10
    IKMarkerTask R_HEEL_LAT: apply=true weight=10
    IKMarkerTask R_TOE: apply=true weight=5
    IKMarkerTask L_THIGH_PROX_POST: apply=true weight=20
    IKMarkerTask L_THIGH_PROX_ANT: apply=true weight=20
    IKMarkerTask L_THIGH_DIST_ANT: apply=true weight=20
    IKMarkerTask L_THIGH_DIST_POST: apply=true weight=20
    IKMarkerTask L_LAT_KNEE: apply=true weight=20
    IKMarkerTask L_MED_KNEE: apply=true weight=20
    IKMarkerTask L_SHANK_PROX_POST: apply=true weight=20
    IKMarkerTask L_SHANK_PROX_ANT: apply=true weight=20
    IKMarkerTask L_SHANK_DIST_ANT: apply=true weight=20
    IKMarkerTask L_SHANK_DIST_POST: apply=true weight=20
    IKMarkerTask L_LAT_ANK: apply=false weight=1
    IKMarkerTask L_MED_ANK: apply=false weight=1
    IKMarkerTask L_HEEL_SUP: apply=true weight=10
    IKMarkerTask L_HEEL_MED: apply=true weight=10
    IKMarkerTask L_HEEL_LAT: apply=true weight=10
    IKMarkerTask L_TOE: apply=true weight=50
    IKMarkerTask R_1ST_MET: apply=true weight=5
    IKMarkerTask R_5TH_MET: apply=true weight=5
    IKMarkerTask L_1ST_MET: apply=true weight=5
    IKMarkerTask L_5TH_MET: apply=true weight=5
