# OpenSim document version 30000
ScaleTool A03_passive_scaled:
  mass: 67.3046 [kg]
  height: -1
  age: -1
  ModelScaler:
    apply: true
    scaling_order: measurements manualScale
    marker_file: Standing_Cal_SL_Passive0001.trc
    time_range: 0 3.5375
    preserve_mass_distribution: true
    MeasurementSet:
      Measurement Pelvis: apply=true
        MarkerPair: markers=(R_ASIS L_ASIS)
        MarkerPair: markers=(R_GT L_GT)
        BodyScale pelvis: axes=(X Y Z)
      Measurement Torso: apply=true
        MarkerPair: markers=(HEAD R_IC)
        MarkerPair: markers=(HEAD L_IC)
        BodyScale torso: axes=(X Y Z)
      Measurement Thigh: apply=true
        MarkerPair: markers=(R_GT R_LAT_KNEE)
        BodyScale femur_r: axes=(X Y Z)
        BodyScale femur_l: axes=(X Y Z)
      Measurement Shank: apply=true
        MarkerPair: markers=(R_MED_KNEE R_MED_ANK)
        MarkerPair: markers=(R_LAT_KNEE R_LAT_ANK)
        BodyScale tibia_r: axes=(X Y Z)
        BodyScale tibia_l_amputated: axes=(X Y Z)
        BodyScale pylon_socket: axes=(X Y Z)
      Measurement Foot: apply=true
        MarkerPair: markers=(R_HEEL_SUP R_TOE)
        BodyScale talus_r: axes=(X Y Z)
        BodyScale calcn_r: axes=(X Y Z)
        BodyScale toes_r: axes=(X Y Z)
        BodyScale foot1: axes=(X Y Z)
        BodyScale foot2: axes=(X Y Z)
    ScaleSet:
      Scale: scales=(1.2 1.2 1.2) segment=pelvis apply=false
      Scale: scales=(1.2 1.2 1.2) segment=talus_r apply=false
      Scale: scales=(1.2 1.2 1.2) segment=calcn_r apply=false
      Scale: scales=(1.2 1.2 1.2) segment=toes_r apply=false
      Scale: scales=(1.2 1.2 1.2) segment=foot1 apply=false
      Scale: scales=(1.2 1.2 1.2) segment=foot2 apply=false
  MarkerPlacer:
    apply: true
    marker_file: Standing_Cal_SL_Passive0001.trc
    time_range: 0 3.5375
    max_marker_movement: -1
    IKTaskSet:
      IKMarkerTask R_AC: apply=true weight=10
      IKMarkerTask L_AC: apply=true weight=10
      IKMarkerTask R_ASIS: apply=true weight=1
      IKMarkerTask L_ASIS: apply=true weight=1
      IKMarkerTask R_PSIS: apply=true weight=1
      IKMarkerTask L_PSIS: apply=true weight=1
      IKMarkerTask R_GT: apply=true weight=1000
      IKMarkerTask L_GT: apply=true weight=1000
      IKMarkerTask R_IC: apply=true weight=1000
      IKMarkerTask L_IC: apply=true weight=1000
      IKMarkerTask SACRAL: apply=true weight=1
      IKMarkerTask R_THIGH_PROX_POST: apply=true weight=1
      IKMarkerTask R_THIGH_PROX_ANT: apply=true weight=1
      IKMarkerTask R_THIGH_DIST_ANT: apply=true weight=1
      IKMarkerTask R_THIGH_DIST_POST: apply=true weight=1
      IKMarkerTask R_LAT_KNEE: apply=true weight=1000
      IKMarkerTask R_MED_KNEE: apply=true weight=1000
      IKMarkerTask R_SHANK_PROX_ANT: apply=true weight=1
      IKMarkerTask R_SHANK_PROX_POST: apply=true weight=1
      IKMarkerTask R_SHANK_DIST_POST: apply=true weight=1
      IKMarkerTask R_SHANK_DIST_ANT: apply=true weight=1
      IKMarkerTask R_LAT_ANK: apply=true weight=1000
      IKMarkerTask R_MED_ANK: apply=true weight=1000
      IKMarkerTask R_HEEL_SUP: apply=true weight=1000
      IKMarkerTask R_HEEL_MED: apply=true weight=1
      IKMarkerTask R_HEEL_LAT: apply=true weight=1
      IKMarkerTask R_TOE: apply=true weight=1000
      IKMarkerTask L_THIGH_PROX_POST: apply=true weight=1
      IKMarkerTask L_THIGH_PROX_ANT: apply=true weight=1
      IKMarkerTask L_THIGH_DIST_ANT: apply=true weight=1
      IKMarkerTask L_THIGH_DIST_POST: apply=true weight=1
      IKMarkerTask L_LAT_KNEE: apply=true weight=1000
      IKMarkerTask L_MED_KNEE: apply=true weight=1000
      IKMarkerTask L_SHANK_PROX_POST: apply=true weight=0
      IKMarkerTask L_SHANK_PROX_ANT: apply=true weight=0
      IKMarkerTask L_SHANK_DIST_ANT: apply=true weight=0
      IKMarkerTask L_SHANK_DIST_POST: apply=true weight=0
      IKMarkerTask L_LAT_ANK: apply=true weight=1
      IKMarkerTask L_MED_ANK: apply=true weight=1
      IKMarkerTask L_HEEL_SUP: apply=true weight=1000
      IKMarkerTask L_HEEL_MED: apply=true weight=1
      IKMarkerTask L_HEEL_LAT: apply=true weight=1
      IKMarkerTask L_TOE: apply=true weight=1000
      IKMarkerTask R_1ST_MET: apply=true weight=1
      IKMarkerTask R_5TH_MET: apply=true weight=1
      IKMarkerTask L_1ST_MET: apply=true weight=1
      IKMarkerTask L_5TH_MET: apply=true weight=1
      IKMarkerTask HEAD: apply=false weight=1
      IKMarkerTask STERN: apply=true weight=10
      IKMarkerTask C7: apply=true weight=1000
      IKCoordinateTask [values shared by the 14 below unless stated]: apply=false value_type=default_value value=0
      IKCoordinateTask hip_flexion_r: weight=1
      IKCoordinateTask knee_angle_r: weight=1 value_type=manual_value
      IKCoordinateTask subtalar_angle_r: weight=1000
      IKCoordinateTask mtp_angle_r: weight=1000
      IKCoordinateTask hip_flexion_l: weight=1
      IKCoordinateTask knee_angle_l: weight=1 value_type=manual_value value=-0.08726646
      IKCoordinateTask socket_flexion: weight=1
      IKCoordinateTask socket_adduction: weight=1
      IKCoordinateTask socket_rotation: weight=1
      IKCoordinateTask socket_tx: weight=1000
      IKCoordinateTask socket_ty: weight=0.001
      IKCoordinateTask socket_tz: weight=1000
      IKCoordinateTask foot_flex: weight=0.005
      IKCoordinateTask lumbar_extension: weight=1000
