# OpenSim document version 30000
InverseKinematicsTool:
  results_directory: ./
  model_file: C:\Users\Mark\Documents\AutoPlaceGit\opensim-marker-place-toolbox\AbleBodied_Dataset\S06\Models\AutoPlaced\S06_no-amp_ALLBODY_auto_marker_place_10tilt_lockedasis_10conv.osim
  constraint_weight: Inf
  accuracy: 1e-5
  marker_file: C:\Users\Mark\Documents\AutoPlaceGit\opensim-marker-place-toolbox\AbleBodied_Dataset\S06\MarkerData\SLOW\S06_M20_T24.trc
  time_range: 0.646 1.897
  report_errors: true
  output_motion_file: C:\Users\Mark\Documents\AutoPlaceGit\opensim-marker-place-toolbox\AbleBodied_Dataset\S06\IKResults\AutoPlace10TiltLockedASIS10Conv\S06_M20_T24_ik.mot
  report_marker_locations: false
  IKTaskSet:
    IKMarkerTask Sternum: apply=true weight=1
    IKMarkerTask R.Acromium: apply=true weight=1
    IKMarkerTask L.Acromium: apply=true weight=1
    IKMarkerTask Top.Head: apply=true weight=1
    IKMarkerTask R.ASIS: apply=true weight=20
    IKMarkerTask L.ASIS: apply=true weight=20
    IKMarkerTask R.PSIS: apply=false weight=10
    IKMarkerTask L.PSIS: apply=false weight=10
    IKMarkerTask R.Great.Tro: apply=false weight=1
    IKMarkerTask L.Great.Tro: apply=false weight=1
    IKMarkerTask R.Iliac.Crest: apply=true weight=1
    IKMarkerTask L.Iliac.Crest: apply=true weight=1
    IKMarkerTask V.Sacral: apply=true weight=20
    IKMarkerTask R.Thigh.Upper.Post: apply=true weight=10
    IKMarkerTask R.Thigh.Upper.Ant: apply=true weight=10
    IKMarkerTask R.Thigh.Lower.Ant: apply=true weight=10
    IKMarkerTask R.Thigh.Lower.Post: apply=true weight=10
    IKMarkerTask R.Knee.Lat: apply=true weight=1000
    IKMarkerTask R.Knee.Med: apply=false weight=1
    IKMarkerTask R.Shank.Upper.Post: apply=true weight=10
    IKMarkerTask R.Shank.Upper.Ant: apply=true weight=10
    IKMarkerTask R.Shank.Lower.Ant: apply=true weight=10
    IKMarkerTask R.Shank.Lower.Post: apply=true weight=10
    IKMarkerTask R.Ankle.Lat: apply=true weight=1
    IKMarkerTask R.Ankle.Med: apply=false weight=1
    IKMarkerTask R.Heel.Upper: apply=true weight=1
    IKMarkerTask R.Heel.Med: apply=true weight=10
    IKMarkerTask R.Heel.Lat: apply=true weight=10
    IKMarkerTask R.Toe.Lat: apply=true weight=10
    IKMarkerTask R.Toe.Med: apply=true weight=10
    IKMarkerTask R.Toe.Tip: apply=true weight=1
    IKMarkerTask L.Thigh.Upper.Post: apply=true weight=10
    IKMarkerTask L.Thigh.Upper.Ant: apply=true weight=10
    IKMarkerTask L.Thigh.Lower.Ant: apply=true weight=10
    IKMarkerTask L.Thigh.Lower.Post: apply=true weight=10
    IKMarkerTask L.Knee.Lat: apply=true weight=1000
    IKMarkerTask L.Knee.Med: apply=false weight=1
    IKMarkerTask L.Shank.Upper.Post: apply=true weight=10
    IKMarkerTask L.Shank.Upper.Ant: apply=true weight=10
    IKMarkerTask L.Shank.Lower.Ant: apply=true weight=10
    IKMarkerTask L.Shank.Lower.Post: apply=true weight=10
    IKMarkerTask L.Ankle.Lat: apply=true weight=1
    IKMarkerTask L.Ankle.Med: apply=false weight=1
    IKMarkerTask L.Heel.Upper: apply=true weight=1
    IKMarkerTask L.Heel.Med: apply=true weight=10
    IKMarkerTask L.Heel.Lat: apply=true weight=10
    IKMarkerTask L.Toe.Lat: apply=true weight=10
    IKMarkerTask L.Toe.Med: apply=true weight=10
    IKMarkerTask L.Toe.Tip: apply=true weight=1
    IKMarkerTask Cervical.Spine: apply=true weight=1
    IKMarkerTask Back: apply=true weight=1
