# OpenSim document version 30000
ScaleTool SF_S09_Scaled:
  mass: 70.41 [kg]
  height: 1803.4
  age: 99
  notes: This is an example setup file for scale.exe.
  GenericModelMaker:
    marker_set_file: C:/Users/russe_000/Desktop/THESIS/DATA/S09/../markers.xml
  ModelScaler:
    apply: true
    scaling_order: measurements manualScale
    marker_file: TRC_Files/S09_BK_Cal_T01.trc
    time_range: 0 9.9958
    preserve_mass_distribution: true
    output_model_file: subject01_scaledOnly.osim
    output_scale_file: subject01_scaleSet_applied.xml
    MeasurementSet gait2354:
      Measurement torso: apply=true
        MarkerPair: markers=(V.Sacral Top.Head)
        BodyScale torso: axes=(X Y Z)
      Measurement pelvis: apply=true
        MarkerPair: markers=(R.ASIS R.PSIS)
        MarkerPair: markers=(L.ASIS L.PSIS)
        BodyScale pelvis: axes=(X Y Z)
      Measurement thigh: apply=true
        MarkerPair: markers=(R.Great.Tro R.Knee.Lat)
        MarkerPair: markers=(L.Great.Tro L.Knee.Lat)
        BodyScale femur_r: axes=(X Y Z)
        BodyScale femur_l: axes=(X Y Z)
      Measurement shank: apply=true
        MarkerPair: markers=(R.Knee.Lat R.Ankle.Lat)
        MarkerPair: markers=(L.Knee.Lat L.Ankle.Lat)
        BodyScale tibia_r: axes=(X Y Z)
        BodyScale talus_r: axes=(X Y Z)
        BodyScale tibia_l: axes=(X Y Z)
        BodyScale talus_l: axes=(X Y Z)
      Measurement foot: apply=true
        MarkerPair: markers=(R.Heel.Upper R.Toe.Tip)
        MarkerPair: markers=(L.Heel.Upper L.Toe.Tip)
        BodyScale calcn_r: axes=(X Y Z)
        BodyScale toes_r: axes=(X Y Z)
        BodyScale calcn_l: axes=(X Y Z)
        BodyScale toes_l: axes=(X Y Z)
      Measurement Pelvis_Y: apply=false
        MarkerPair: markers=(L.Iliac.Crest L.Great.Tro)
        MarkerPair: markers=(R.Iliac.Crest R.Great.Tro)
    ScaleSet gait2354_Scale:
      Scale: scales=(1.14724 1.14724 1.14724) segment=femur_r apply=false
      Scale: scales=(0.988523 0.988523 0.988523) segment=tibia_r apply=false
      Scale: scales=(1.14724 1.14724 1.14724) segment=femur_l apply=false
      Scale: scales=(0.988523 0.988523 0.988523) segment=tibia_l apply=false
  MarkerPlacer:
    apply: true
    marker_file: TRC_Files/S09_BK_Cal_T01.trc
    time_range: 0 9.9958
    output_motion_file: subject01_static_output.mot
    output_model_file: subject01_simbody.osim
    max_marker_movement: -1
    IKTaskSet gait2354_Scale:
      IKMarkerTask Sternum: apply=false weight=1
      IKMarkerTask R.Acromium: apply=false weight=0.2
      IKMarkerTask L.Acromium: apply=false weight=0.2
      IKMarkerTask Top.Head: apply=false weight=1
      IKMarkerTask R.ASIS: apply=true weight=6
      IKMarkerTask L.ASIS: apply=true weight=6
      IKMarkerTask R.PSIS: apply=true weight=20
      IKMarkerTask L.PSIS: apply=true weight=20
      IKMarkerTask R.Great.Tro: apply=false weight=1
      IKMarkerTask L.Great.Tro: apply=false weight=1
      IKMarkerTask R.Iliac.Crest: apply=false weight=1
      IKMarkerTask L.Iliac.Crest: apply=false weight=1
      IKMarkerTask V.Sacral: apply=false weight=1
      IKMarkerTask R.Thigh.Upper.Post: apply=false weight=1
      IKMarkerTask R.Thigh.Upper.Ant: apply=false weight=1
      IKMarkerTask R.Thigh.Lower.Ant: apply=false weight=1
      IKMarkerTask R.Thigh.Lower.Post: apply=false weight=1
      IKMarkerTask R.Knee.Lat: apply=true weight=20
      IKMarkerTask R.Knee.Med: apply=false weight=1
      IKMarkerTask R.Shank.Upper.Post: apply=false weight=1
      IKMarkerTask R.Shank.Upper.Ant: apply=false weight=1
      IKMarkerTask R.Shank.Lower.Ant: apply=false weight=1
      IKMarkerTask R.Shank.Lower.Post: apply=false weight=1
      IKMarkerTask R.Ankle.Lat: apply=true weight=1
      IKMarkerTask R.Ankle.Med: apply=false weight=1
      IKMarkerTask R.Heel.Upper: apply=false weight=1
      IKMarkerTask R.Heel.Med: apply=true weight=1
      IKMarkerTask R.Heel.Lat: apply=true weight=1
      IKMarkerTask R.Toe.Lat: apply=true weight=1
      IKMarkerTask R.Toe.Med: apply=true weight=1
      IKMarkerTask R.Toe.Tip: apply=false weight=1
      IKMarkerTask L.Thigh.Upper.Post: apply=false weight=1
      IKMarkerTask L.Thigh.Upper.Ant: apply=false weight=1
      IKMarkerTask L.Thigh.Lower.Ant: apply=false weight=1
      IKMarkerTask L.Thigh.Lower.Post: apply=false weight=1
      IKMarkerTask L.Knee.Lat: apply=true weight=20
      IKMarkerTask L.Knee.Med: apply=false weight=1
      IKMarkerTask L.Shank.Upper.Post: apply=false weight=1
      IKMarkerTask L.Shank.Upper.Ant: apply=false weight=1
      IKMarkerTask L.Shank.Lower.Ant: apply=false weight=1
      IKMarkerTask L.Shank.Lower.Post: apply=false weight=1
      IKMarkerTask L.Ankle.Lat: apply=true weight=1
      IKMarkerTask L.Ankle.Med: apply=false weight=1
      IKMarkerTask L.Heel.Upper: apply=false weight=1
      IKMarkerTask L.Heel.Med: apply=true weight=1
      IKMarkerTask L.Heel.Lat: apply=true weight=1
      IKMarkerTask L.Toe.Lat: apply=true weight=1
      IKMarkerTask L.Toe.Med: apply=true weight=1
      IKMarkerTask L.Toe.Tip: apply=false weight=1
      IKMarkerTask Cervical.Spine: apply=false weight=1
      IKMarkerTask Back: apply=false weight=1
      IKCoordinateTask [values shared by the 5 below unless stated]: apply=true value_type=manual_value value=0
      IKCoordinateTask subtalar_angle_r: weight=10
      IKCoordinateTask mtp_angle_r: weight=1
      IKCoordinateTask subtalar_angle_l: weight=10
      IKCoordinateTask mtp_angle_l: weight=1
      IKCoordinateTask lumbar_extension: apply=false weight=1 value_type=default_value
